// SBML level 3 version 2
// Created with https://github.com/matthiaskoenig/sbmlutils.

model iri_perfusion(Vext, Vli, Vinflow, glc_ext, o2_ext, lac_ext)
  // Model for hepatic ischemia reperfusion injury (IRI)
  // Phenomenological model for perfusion with hepatic metabolism of relevant for IRI in SBML format.
  // version: 2
  // Changelog
  // version 1
  // removed ALT and AST from circulation
  // version 1
  // initial model
  // Terms of use
  // The content of this model has been carefully created in a manual research effort. This file has been created by Matthias König using sbmlutils. For questions contact koenigmx@hu-berlin.de. Copyright © 2023 Matthias König.
  // This work is licensed under a Creative Commons Attribution 4.0 International License.
  // Redistribution and use of any part of this model, with or without modification, are permitted provided that the following conditions are met:
  // Redistributions of this SBML file must retain the above copyright notice, this list of conditions and the following disclaimer.
  // Redistributions in a different form must reproduce the above copyright notice, this list of conditions and the following disclaimer in the documentation and/or other materials provided with the distribution.
  // This model is distributed in the hope that it will be useful, but WITHOUT ANY WARRANTY; without even the implied warranty of MERCHANTABILITY or FITNESS FOR A PARTICULAR PURPOSE.
  // model units - substance: mmole, time: min, volume: litre, area: m2, length: metre, extent: mmole

  // Compartments:
  compartment Vext = 0.1 litre; Vext is "plasma";  // SBO:0000290 ncit:C13356 BTO:0000131
  compartment Vli = 1.5 litre; Vli is "liver";  // SBO:0000290 FMA:7197 BTO:0000759 ncit:C12392
  compartment Vmem = 1 m2; Vmem is "plasma membrane";  // SBO:0000290 ncit:C13735 FMA:63841 GO:0005886
  // Inflow compartment, setting boundary conditions
  compartment Vinflow = 0.1 litre; Vinflow is "periportal";  // SBO:0000290 ncit:C13356 BTO:0000131

  // Species:
  species glc_ext in Vext = 5; glc_ext is "D-glucose (plasma)";  // SBO:0000247 CHEBI:4167 pubchem.compound:5793 inchikey:WQZGKKKJIJFFOK-GASJEMHNSA-N; isVersionOf CHEBI:17634
  species glc in Vli = 5; glc is "D-glucose (liver)";  // SBO:0000247 CHEBI:4167 pubchem.compound:5793 inchikey:WQZGKKKJIJFFOK-GASJEMHNSA-N; isVersionOf CHEBI:17634
  species o2_ext in Vext = 1.2; o2_ext is "dioxygen (plasma)";  // SBO:0000247 CHEBI:15379 pubchem.compound:977 inchikey:MYMOFIZGZYHOMD-UHFFFAOYSA-N
  species o2 in Vli = 1.2; o2 is "dioxygen (liver)";  // SBO:0000247 CHEBI:15379 pubchem.compound:977 inchikey:MYMOFIZGZYHOMD-UHFFFAOYSA-N
  species lac_ext in Vext = 1; lac_ext is "D-lactate (plasma)";  // SBO:0000247 CHEBI:16004 pubchem.compound:61503 inchikey:JVTAAEKCZFNVCJ-UWTATZPHSA-N
  species lac in Vli = 1; lac is "D-lactate (liver)";  // SBO:0000247 CHEBI:16004 pubchem.compound:61503 inchikey:JVTAAEKCZFNVCJ-UWTATZPHSA-N
  species alt_ext in Vext = 0; alt_ext is "ALT";  // SBO:0000247 ncit:C25293
  species ast_ext in Vext = 0; ast_ext is "AST";  // SBO:0000247 ncit:C25202
  species pyr in Vli = 0.8; pyr is "D-pyruvate (liver)";  // SBO:0000247 CHEBI:15361 pubchem.compound:107735 inchikey:LCTONWCANYUPML-UHFFFAOYSA-M
  species atp in Vli = 3; atp is "ATP (liver)";  // SBO:0000247 CHEBI:15422 pubchem.compound:5957 inchikey:ZKHQWZAMYRWXGA-KQYNXXCUSA-N
  species adp in Vli = 1; adp is "ADP";  // SBO:0000247 CHEBI:16761 pubchem.compound:6022 inchikey:XTWYTFMLZFPYCI-KQYNXXCUSA-N
  species nadh in Vli = 3.9; nadh is "NADH";  // SBO:0000247 CHEBI:16908 pubchem.compound:439153 inchikey:BOPGDPNILDQYTO-NNYOXOHSSA-N
  species nad in Vli = 0.1; nad is "NAD";  // SBO:0000247 CHEBI:44215 pubchem.compound:5892 inchikey:BAWFJGJZGIEFAR-NNYOXOHSSA-N
  species ros in Vli = 0; ros is "reactive oxygen species (ROS)";  // SBO:0000247 CHEBI:26523 omit:0017748
  species alt in Vli = 1; alt is "ALT (liver)";  // SBO:0000247 ncit:C25293
  species ast in Vli = 0.7; ast is "AST (liver)";  // SBO:0000247 ncit:C25202
  // necrosis state [0 (alive), 1 (death)]
  substanceOnly species necrosis in Vli; necrosis is "necrosis state";  // substance in dimensionless; conversionFactor cf_dimensionless
  species $glc_inflow in Vinflow = 5; glc_inflow is "glucose (inflow)";  // SBO:0000247 CHEBI:4167 pubchem.compound:5793 inchikey:WQZGKKKJIJFFOK-GASJEMHNSA-N; isVersionOf CHEBI:17634
  species $o2_inflow in Vinflow = 1.2; o2_inflow is "oxygen (inflow)";  // SBO:0000247 CHEBI:15379 pubchem.compound:977 inchikey:MYMOFIZGZYHOMD-UHFFFAOYSA-N
  species $lac_inflow in Vinflow = 1; lac_inflow is "lactate (inflow)";  // SBO:0000247 CHEBI:16004 pubchem.compound:61503 inchikey:JVTAAEKCZFNVCJ-UWTATZPHSA-N

  // Parameters:
  cf_dimensionless = 1 per_mmole; cf_dimensionless is "conversion factor for dimensionless species";  // SBO:0000002
  necrosis_atp_threshold = 0.1 mM; necrosis_atp_threshold is "E50 ATP threshold for necrosis to occur [mM]";
  necrosis_atp_gamma = 10 dimensionless; necrosis_atp_gamma is "slope gamma for necrosis";
  tsim = 0 min; tsim is "simulation time";
  // Used for temperature dependence of reaction rates via the Arrhenius equation
  temperature = 310.15 K; temperature is "temperature [K]";
  temperature_ref = 310.15 K; temperature_ref is "reference temperature (37°C) [K]";
  R = 8.314 joule_per_mole_kelvin; R is "Rydberg constant [J/mol/K]";
  f_Ea = 12 dimensionless; f_Ea is "factor activation energy Ea";
  f_scale = 2 dimensionless; f_scale is "factor for speedup/slowdown of system";
  PROTEINR_k = 0.2 per_min; PROTEINR_k is "Vmax protein release";  // SBO:0000186
  perfusion = 1 per_min; perfusion is "perfusion in ml/min per ml tissue";
  GLCIM_Vmax = 100 mmole_per_min_l; GLCIM_Vmax is "Vmax S import";  // SBO:0000186
  GLCIM_Km_glc = 0.1 mM; GLCIM_Km_glc is "Km S import";  // SBO:0000027
  O2IM_Vmax = 100 mmole_per_min_l; O2IM_Vmax is "Vmax O2 import";  // SBO:0000186
  O2IM_Km_o2 = 0.1 mM; O2IM_Km_o2 is "Km S import";  // SBO:0000027
  LACEX_Vmax = 100 mmole_per_min_l; LACEX_Vmax is "Vmax lactate export";  // SBO:0000186
  LACEX_Km_lac = 0.5 mM; LACEX_Km_lac is "Km lac import";  // SBO:0000027
  GLC2PYR_Vmax = 0.2 mmole_per_min_l; GLC2PYR_Vmax is "Vmax glycolysis";  // SBO:0000186
  GLC2PYR_Km_glc = 0.5 mM; GLC2PYR_Km_glc is "Km glc glycolysis";  // SBO:0000027
  GLC2PYR_Km_adp = 0.01 mM; GLC2PYR_Km_adp is "Km adp glycolysis";  // SBO:0000027
  GLC2PYR_Ki_atp = 1.5 mM; GLC2PYR_Ki_atp is "Ki atp glycolysis";  // SBO:0000027
  GLC2PYR_n_atp = 4 dimensionless; GLC2PYR_n_atp is "n atp glycolysis";  // SBO:0000191
  LDH_Vmax = 1 mmole_per_min_l; LDH_Vmax is "Vmax lactate dehydrogenase";  // SBO:0000186
  LDH_Km_pyr = 1 mM; LDH_Km_pyr is "Km pyr lactate dehydrogenase";  // SBO:0000027
  LDH_Km_lac = 1 mM; LDH_Km_lac is "Km lac lactate dehydrogenase";  // SBO:0000027
  LDH_Ka_nadh = 0.1 mM; LDH_Ka_nadh is "Ki nadh lactate dehydrogenase";  // SBO:0000363
  LDH_Keq = 1.5 dimensionless; LDH_Keq is "Keq lactate dehydrogenase";  // SBO:0000281
  ATPU_Vmax = 0.1 mmole_per_min_l; ATPU_Vmax is "Vmax lactate dehydrogenase";  // SBO:0000186
  ATPU_Km_atp = 0.01 mM; ATPU_Km_atp is "Km atp atp usage";  // SBO:0000027
  TCA_Vmax = 0.01 mmole_per_min_l; TCA_Vmax is "Vmax glycolysis";  // SBO:0000186
  TCA_Km_pyr = 0.1 mM; TCA_Km_pyr is "Km glc oxidative phosphorylation";  // SBO:0000027
  TCA_Km_nad = 0.01 mM; TCA_Km_nad is "Km nad oxidative phosphorylation";  // SBO:0000027
  OXPHOS_Vmax = 0.03 mmole_per_min_l; OXPHOS_Vmax is "Vmax glycolysis";  // SBO:0000186
  OXPHOS_Km_nadh = 0.05 mM; OXPHOS_Km_nadh is "Km nadh oxidative phosphorylation";  // SBO:0000027
  OXPHOS_Km_o2 = 0.05 mM; OXPHOS_Km_o2 is "Km o2 oxidative phosphorylation";  // SBO:0000027
  OXPHOS_Km_adp = 0.05 mM; OXPHOS_Km_adp is "Km adp oxidative phosphorylation";  // SBO:0000027
  ROSP_Vmax = 0.005 mmole_per_min_l; ROSP_Vmax is "Vmax factor oxidative phosphorylation";  // SBO:0000186
  // At low oxygen concentrations ROS production can occur, because oxygen is missing as terminal electron acceptor in the electron transport chain. Under conditions of high electron load in electron transport chain (large amounts of NADH) and missing oxygen ROS can be created.
  ros_o2_threshold = 0.1 mM; ros_o2_threshold is "O2 threshold for ROS production [mM]";
  ros_o2_gamma = 2 dimensionless; ros_o2_gamma is "O2 gamma for ROS production";
  f_temperature has dimensionless; f_temperature is "temperature dependence of reaction rates";
  Qli has liter_per_min; Qli is "liver blood flow [l/min]";

  // Assignment rules:
  necrosis := 1 - atp^necrosis_atp_gamma/(atp^necrosis_atp_gamma + necrosis_atp_threshold^necrosis_atp_gamma);
  f_temperature := f_scale*exp(-(f_Ea*R*temperature_ref)/(R*temperature))/exp(-(f_Ea*R*temperature_ref)/(R*temperature_ref));
  Qli := Vli*perfusion;

  // Rate rules:
  tsim' = 1;

  // Reactions:
  GLCIM: glc_ext -> glc; f_temperature*(1 - necrosis)*Vli*GLCIM_Vmax/GLCIM_Km_glc*(glc_ext - glc)/(1 + glc_ext/GLCIM_Km_glc + glc/GLCIM_Km_glc); GLCIM is "glucose import (GLCIM)";  // SBO:0000655
  O2IM: o2_ext -> o2; f_temperature*(1 - necrosis)*Vli*O2IM_Vmax/O2IM_Km_o2*(o2_ext - o2)/(1 + o2_ext/O2IM_Km_o2 + o2/O2IM_Km_o2); O2IM is "oxygen import (O2IM)";  // SBO:0000655
  LACEX: lac -> lac_ext; f_temperature*(1 - necrosis)*Vli*LACEX_Vmax/LACEX_Km_lac*(lac - lac_ext)/(1 + lac_ext/LACEX_Km_lac + lac/LACEX_Km_lac); LACEX is "lactate export (LACEX)";  // SBO:0000655
  // Activation of glycolysis due to falling ATP levels in the cell. This is highly nonlinear to compensate for the much larger ATP contribution of the oxidative phosphorylation.
  GLC2PYR: glc + 2 adp => pyr + 2 atp; f_temperature*(1 - necrosis)*Vli*(GLC2PYR_Ki_atp/atp)^GLC2PYR_n_atp*GLC2PYR_Vmax*glc/(glc + GLC2PYR_Km_glc)*adp/(adp + GLC2PYR_Km_adp); GLC2PYR is "glycolysis";  // SBO:0000176
  LDH: pyr => lac; f_temperature*(1 - necrosis)*Vli*LDH_Vmax/LDH_Km_pyr*(1 + nadh/LDH_Ka_nadh)*(pyr - lac/LDH_Keq)/(1 + pyr/LDH_Km_pyr + lac/LDH_Km_lac); LDH is "lactate dehydrogenase (LDH)";  // modifiers: nadh; SBO:0000176
  // All reactions beside ATPU are shut down via necrosis. This ensures that all ATP is converted to ADP with a smooth necrosis switch.
  ATPU: atp => adp; f_temperature*Vli*ATPU_Vmax*atp/(ATPU_Km_atp + atp); ATPU is "ATP usage (ATPU)";  // SBO:0000176
  TCA: pyr + 6 nad => 6 nadh; f_temperature*(1 - necrosis)*Vli*TCA_Vmax*pyr/(pyr + TCA_Km_pyr)*nad/(nad + TCA_Km_nad); TCA is "tca cycle (TCA)";  // SBO:0000176
  // Around 10 protons pumped for NADH. ~3 protons per pump in ATPsynthase.
  OXPHOS: nadh + 0.5 o2 + 3 adp => nad + 3 atp; f_temperature*(1 - necrosis)*Vli*OXPHOS_Vmax*nadh/(nadh + OXPHOS_Km_nadh)*o2/(o2 + OXPHOS_Km_o2)*adp/(adp + OXPHOS_Km_adp); OXPHOS is "oxidative phosphorylation (OXPHOS)";  // SBO:0000176
  ROSP: => ros; f_temperature*(1 - necrosis)*Vli*ROSP_Vmax*nadh/(nadh + OXPHOS_Km_nadh)*(1 - o2^ros_o2_gamma/(o2^ros_o2_gamma + ros_o2_threshold^ros_o2_gamma)); ROSP is "reactive oxygen production (ROSP)";  // modifiers: nadh, o2; SBO:0000176
  ROSD: ros => ; f_temperature*(1 - necrosis)*Vli*ROSP_Vmax*ros/ros_o2_threshold; ROSD is "reactive oxygen detoxification (ROSD)";  // SBO:0000176
  ALTR: alt => alt_ext; f_temperature*necrosis*Vli*PROTEINR_k*alt; ALTR is "ALT release (ALTR)";  // modifiers: necrosis; SBO:0000176
  ASTR: ast => ast_ext; f_temperature*necrosis*Vli*PROTEINR_k*ast; ASTR is "AST release (ASTR)";  // modifiers: necrosis; SBO:0000176
  Inflow_glc: $glc_inflow => glc_ext; Qli*glc_inflow; Inflow_glc is "inflow glucose";  // SBO:0000655
  Outflow_glc: glc_ext => ; Qli*glc_ext; Outflow_glc is "outflow glucose";  // SBO:0000655
  Inflow_o2: $o2_inflow => o2_ext; Qli*o2_inflow; Inflow_o2 is "inflow oxygen";  // SBO:0000655
  Outflow_o2: o2_ext => ; Qli*o2_ext; Outflow_o2 is "outflow oxygen";  // SBO:0000655
  Inflow_lac: $lac_inflow => lac_ext; Qli*lac_inflow; Inflow_lac is "inflow lactate";  // SBO:0000655
  Outflow_lac: lac_ext => ; Qli*lac_ext; Outflow_lac is "outflow lactate";  // SBO:0000655

  // Unit definitions:
  unit K = kelvin; K is "kelvin";
  unit g_per_mole = gram / mole; g_per_mole is "g/mole";
  unit joule_per_mole_kelvin = 1000 gram * metre^2 / (second^2 * mole * kelvin); joule_per_mole_kelvin is "(kg*m^2/s^2)/mole/kelvin";
  unit l_per_min = litre / (60 second); l_per_min is "l/min";
  unit liter_per_min = litre / (60 second); liter_per_min is "l/min";
  unit m2 = metre^2; m2 is "meter^2";
  unit mM = 1e-3 mole / litre; mM is "mmole/liter";
  unit mg = 1e-3 gram;
  unit mg_per_s_l = 1e-3 gram / (second * litre); mg_per_s_l is "mg/s/l";
  unit min = 60 second;
  unit min_per_hr = 60 second / (3600 second); min_per_hr is "min/hour";
  unit ml = 1e-3 litre;
  unit mmole = 1e-3 mole;
  unit mmole_per_min = 1e-3 mole / (60 second); mmole_per_min is "mmole/min";
  unit mmole_per_min_l = 1e-3 mole / (60 second * litre); mmole_per_min_l is "mmole/min/l";
  unit mumole = 1e-6 mole; mumole is "µmole";
  unit per_min = 1 / (60 second); per_min is "1/min";
  unit per_mmole = 1 / (1e-3 mole); per_mmole is "1/mmole";
end
